OpenVSP model (file version 4), 3 components.
Geometry view with OpenVSP parameter names; values to 6 digits, angles in degrees, lengths in the model's unit.
Overall bounding box: X_Min=0 X_Len=1 Y_Min=-0.03766 Y_Len=0.07554 Z_Min=-0.03782 Z_Len=0.07564

Blank "BlankGeom"
  location (X Y Z) 0 0 0, rotation 0 0 0

WireFrame "SHBody", child of "BlankGeom"
  location (X Y Z) 0 0 0, rotation 0 0 0
  WireFrame: ISkipEnd=0 ISkipStart=0 IStartPatchType=0 IStride=1 JSkipEnd=0 JSkipStart=0 JStride=1 WireType=1
  Wireframe: FlipIJFlag=0 InvertFlag=0 RevIFlag=0 RevJFlag=0

Mesh "MeshGeom"
  location (X Y Z) 0 0 0, rotation 0 0 0
  triangle mesh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
